# OpenSim document version 30000
MarkerSet:
  Marker Xiphoid: torso (0.0952429 0.216442 -0.000651622)
  Marker RShoulder: torso (-0.03 0.44 0.15)
  Marker LShoulder: torso (-0.03 0.44 -0.15)
  Marker RAsis: pelvis (0.0188786 0.0234149 0.143924)
  Marker LAsis: pelvis (0.0188786 0.0234149 -0.143924)
  Marker LPsis: pelvis (-0.173283 0.0440815 -0.0536969)
  Marker RThighSuperior: femur_r (0.00554746 -0.110009 0.0732635)
  Marker RThighLateral: femur_r (0.08 -0.25 0.0047)
  Marker RThighInferior: femur_r (0.041601 -0.337568 0.0569143)
  Marker RKneeLateral: femur_r (0 -0.404 0.05)
  Marker RKneeMedial: femur_r (0 -0.404 -0.05)
  Marker RShankSuperior: tibia_r (0.00526166 -0.071428 0.0560868)
  Marker RShankLateral: tibia_r (0.0365248 -0.213098 -0.00271384)
  Marker RShankInferior: tibia_r (0.0099959 -0.35096 0.0575219)
  Marker RAnkleLateral: tibia_r (-0.005 -0.41 0.053)
  Marker RAnkleMedial: tibia_r (0.006 -0.396164 -0.038)
  Marker RHeel: calcn_r (-0.02 0.02 0)
  Marker RMidfootSuperior: calcn_r (0.126069 0.0483623 0.000319311)
  Marker RMidfootLateral: calcn_r (0.1 0.02 0.04)
  Marker RToeLateral: calcn_r (0.167605 0.00698322 0.0605506)
  Marker RToeMedial: calcn_r (0.19 0.005 -0.04)
  Marker RToe: calcn_r (0.26 0.005 0)
  Marker LThighSuperior: femur_l (0.018 -0.132978 -0.071885)
  Marker LThighLateral: femur_l (0.08 -0.25 -0.0047)
  Marker LThighInferior: femur_l (0.0331999 -0.354942 -0.0498276)
  Marker LKneeLateral: femur_l (0 -0.404 -0.05)
  Marker LKneeMedial: femur_l (0 -0.404 0.05)
  Marker LShankSuperior: tibia_l (-0.000176008 -0.0780282 -0.0584081)
  Marker LShankLateral: tibia_l (0.0370309 -0.22252 0.00851738)
  Marker LShankInferior: tibia_l (-0.000871141 -0.362303 -0.0503074)
  Marker LAnkleLateral: tibia_l (-0.005 -0.41 -0.053)
  Marker LAnkleMedial: tibia_l (0.006 -0.398045 0.0389245)
  Marker LHeel: calcn_l (-0.02 0.02 0)
  Marker LMidfootSuperior: calcn_l (0.12939 0.0470507 -0.00305574)
  Marker LMidfootLateral: calcn_l (0.1 0.02 -0.04)
  Marker LToeLateral: calcn_l (0.16217 0.0039916 -0.0592526)
  Marker LToeMedial: calcn_l (0.19 0.005 0.04)
  Marker LToe: calcn_l (0.26 0.005 0)
  Marker RPsis: pelvis (-0.173283 0.0440815 0.0536969)
  Marker Sternum: torso (0.0461869 0.358986 -0.00149307)
