# OpenSim document version 30000
AnalyzeTool AB08_12Mar_ss_12ms_01:
  model_file: AB08.osim
  replace_force_set: false
  results_directory: .\
  output_precision: 8
  initial_time: 15.3
  final_time: 30.455
  solve_for_equilibrium_for_auxiliary_states: false
  maximum_number_of_integrator_steps: 20000
  maximum_integrator_step_size: 1
  minimum_integrator_step_size: 1e-8
  integrator_error_tolerance: 1e-5
  external_loads_file: _12Mar_ss_12ms_01ExternalLoads.xml
  coordinates_file: _12Mar_ss_12ms_01IKResults.mot
  lowpass_cutoff_frequency_for_coordinates: 10
  AnalysisSet Analyses:
    MuscleAnalysis: start_time=15.3 end_time=30.455 step_interval=1 in_degrees=true muscle_list=all
        moment_arm_coordinate_list=all compute_moments=true
