# OpenSim document version 40000
InverseKinematicsTool AB28:
  results_directory: C:/Users/alexw/Dropbox/ABI/Level_8_Lab/OpenSim Tools/ProcessingTrialDataFromVicon/Output\AB28\_05Apr_ss_11ms_01
  input_directory: C:/Users/alexw/Dropbox/ABI/Level_8_Lab/OpenSim Tools/ProcessingTrialDataFromVicon/Output\AB28\_05Apr_ss_11ms_01
  model_file: C:/Users/alexw/Dropbox/ABI/Level_8_Lab/OpenSim Tools/ProcessingTrialDataFromVicon/Output\AB28\AB28.osim
  constraint_weight: Inf
  accuracy: 1e-5
  marker_file: C:/Users/alexw/Dropbox/ABI/Level_8_Lab/OpenSim Tools/ProcessingTrialDataFromVicon/Output\AB28\_05Apr_ss_11ms_01\_05Apr_ss_11ms_01.trc
  time_range: 15.09 30.56
  report_errors: true
  output_motion_file: C:/Users/alexw/Dropbox/ABI/Level_8_Lab/OpenSim Tools/ProcessingTrialDataFromVicon/Output\AB28\_05Apr_ss_11ms_01\_05Apr_ss_11ms_01IKResults.mot
  report_marker_locations: false
  IKTaskSet:
    IKMarkerTask LASI: apply=true weight=10
    IKMarkerTask RASI: apply=true weight=10
    IKMarkerTask LPSI: apply=true weight=10
    IKMarkerTask RPSI: apply=true weight=10
    IKMarkerTask LTH1: apply=true weight=1
    IKMarkerTask LTH2: apply=true weight=1
    IKMarkerTask LTH3: apply=true weight=1
    IKMarkerTask LTH4: apply=true weight=1
    IKMarkerTask LMFC: apply=true weight=1
    IKMarkerTask LLFC: apply=true weight=1
    IKMarkerTask LTB1: apply=true weight=1
    IKMarkerTask LTB2: apply=true weight=1
    IKMarkerTask LTB3: apply=true weight=1
    IKMarkerTask LTB4: apply=true weight=1
    IKMarkerTask LMMAL: apply=true weight=10
    IKMarkerTask LLMAL: apply=true weight=10
    IKMarkerTask LCAL: apply=true weight=1
    IKMarkerTask LToe: apply=true weight=1
    IKMarkerTask LMT1: apply=true weight=1
    IKMarkerTask LMT5: apply=true weight=1
    IKMarkerTask RTH1: apply=true weight=1
    IKMarkerTask RTH2: apply=true weight=1
    IKMarkerTask RTH3: apply=true weight=1
    IKMarkerTask RTH4: apply=true weight=1
    IKMarkerTask RMFC: apply=true weight=1
    IKMarkerTask RLFC: apply=true weight=1
    IKMarkerTask RTB1: apply=true weight=1
    IKMarkerTask RTB2: apply=true weight=1
    IKMarkerTask RTB3: apply=true weight=1
    IKMarkerTask RTB4: apply=true weight=1
    IKMarkerTask RMMAL: apply=true weight=10
    IKMarkerTask RLMAL: apply=true weight=10
    IKMarkerTask RCAL: apply=true weight=1
    IKMarkerTask RToe: apply=true weight=1
    IKMarkerTask RMT1: apply=true weight=1
    IKMarkerTask RMT5: apply=true weight=1
    IKMarkerTask C7: apply=true weight=1
    IKMarkerTask T10: apply=true weight=1
    IKMarkerTask LACR1: apply=true weight=1
    IKMarkerTask RACR1: apply=true weight=1
    IKMarkerTask CLAV: apply=true weight=1
    IKMarkerTask RBack: apply=true weight=1
