# OpenSim document version 30000
MarkerSet:
  Marker LTB3: tibia_l (0.0235258 -0.133848 -0.0533329)
  Marker RCAL: calcn_r (-0.0347816 -0.0223768 0.0105699)
  Marker LLMAL: tibia_l (-0.00186943 -0.360316 -0.0506512)
  Marker LCAL: calcn_l (-0.0339773 -0.0166985 -0.0172399)
  Marker RMT1: toes_r (0.00893944 -0.0152683 -0.0659082)
  Marker RMT5: toes_r (0.0122675 -0.0241193 0.0577084)
  Marker CLAV: torso (0.0427712 0.439769 -0.00929849)
  Marker RMFC: femur_r (0.00315935 -0.396432 -0.080788)
  Marker RTB4: tibia_r (-0.000893927 -0.15009 0.0707696)
  Marker RLMAL: tibia_r (-0.00533486 -0.372118 0.0525954)
  Marker C7: torso (-0.121349 0.464303 -0.0169472)
  Marker LMT1: toes_l (0.0100308 -0.00645614 0.061522)
  Marker LASI: pelvis (0.0388426 -0.00952764 -0.128377)
  Marker RTH4: femur_r (0.0666727 -0.231305 0.0501082)
  Marker LMT5: toes_l (0.0190196 -0.0236813 -0.062202)
  Marker LTH1: femur_l (0.101526 -0.217149 -0.0198874)
  Marker LTH2: femur_l (0.0831119 -0.250633 -0.0326192)
  Marker LTH3: femur_l (0.0770334 -0.296238 0.0155908)
  Marker LTB2: tibia_l (-0.0245628 -0.134101 -0.0776091)
  Marker LMMAL: tibia_l (0.00177271 -0.351087 0.0363559)
  Marker LTB1: tibia_l (-0.0205789 -0.0497409 -0.0764493)
  Marker LTB4: tibia_l (0.0148104 -0.0945685 -0.0603903)
  Marker RTH3: femur_r (0.0487218 -0.286193 0.0420355)
  Marker LTH4: femur_l (0.090022 -0.260509 -0.000336854)
  Marker RACR1: torso (-0.0638249 0.455665 0.144837)
  Marker RMMAL: tibia_r (0.0054663 -0.356273 -0.0377908)
  Marker RTB1: tibia_r (0.0189343 -0.064783 0.0545035)
  Marker RTB2: tibia_r (0.0305636 -0.100615 0.0414694)
  Marker RTB3: tibia_r (0.0366816 -0.150217 0.0317288)
  Marker LToe: toes_l (0.102197 -0.00415375 0.0516591)
  Marker RToe: toes_r (0.104714 -0.00745556 -0.0521004)
  Marker LPSI: pelvis (-0.185155 -0.000969253 -0.0614322)
  Marker RTH2: femur_r (0.0781281 -0.262792 -0.00641214)
  Marker RBack: torso (-0.150254 0.350849 0.11036)
  Marker RPSI: pelvis (-0.195051 0.00143008 0.0644827)
  Marker RASI: pelvis (0.0373299 0.00136604 0.123801)
  Marker LMFC: femur_l (0.00358625 -0.389287 0.0789513)
  Marker LACR1: torso (-0.0468904 0.452146 -0.182444)
  Marker T10: torso (-0.121781 0.20847 -0.0155318)
  Marker RTH1: femur_r (0.0945605 -0.200464 0.00633775)
  Marker LLFC: femur_l (-0.00307907 -0.384438 -0.0481399)
  Marker RLFC: femur_r (-0.00303369 -0.381558 0.0487798)
