# OpenSim document version 30000
AnalyzeTool H23s1Walk1:
  model_file: C:\Users\dbak576\Desktop\Duncan Bakke Modelling Files\H23s1\H23s1.osim
  replace_force_set: false
  results_directory: .\
  output_precision: 8
  initial_time: 3.16
  final_time: 4.83
  solve_for_equilibrium_for_auxiliary_states: false
  maximum_number_of_integrator_steps: 20000
  maximum_integrator_step_size: 1
  minimum_integrator_step_size: 1e-8
  integrator_error_tolerance: 1e-5
  external_loads_file: C:/Users/dbak576/Desktop/Duncan Bakke Modelling Files/xmlTemplates/../Output/H23s1/Walk1/Walk1ExternalLoads.xml
  coordinates_file: C:\Users\dbak576\Desktop\Duncan Bakke Modelling Files\xmlTemplates\..\C:\Users\dbak576\Desktop\Duncan Bakke Modelling Files\Output\H23s1\Walk1\..\..\..\..\H23s1HJCResults\Output_-0.027626_-0.084347_0.082518\H23s1\Walk1\Walk1IKResults.mot
  lowpass_cutoff_frequency_for_coordinates: 6
  AnalysisSet Analyses:
    MuscleAnalysis: start_time=3.16 end_time=4.83 step_interval=1 in_degrees=true muscle_list=all
        moment_arm_coordinate_list=all compute_moments=true
