# OpenSim document version 30000
ScaleTool H20s1:
  mass: 75.1646 [kg]
  height: -1
  age: -1
  GenericModelMaker:
    marker_set_file: C:/Users/dbak576/Documents/MAPClient Stuff/MATLAB/../HipOA_Data_H20s1/H20s1_MarkerSet_from_MarkerPlacer.xml
  ModelScaler:
    apply: true
    scaling_order: measurements
    marker_file: C:/Users/dbak576/Documents/MAPClient Stuff/MATLAB/../HipOA_Data_H20s1/Static_H20s1.trc
    time_range: 0.005 3.36
    preserve_mass_distribution: false
    MeasurementSet:
      Measurement ASISwidth: apply=true
        MarkerPair: markers=(LASI RASI)
        BodyScale pelvis: axes=(X Y Z)
      Measurement LFemurLengthLat: apply=true
        MarkerPair: markers=(LASI LLFC)
        BodyScale femur_l: axes=(X Y Z)
      Measurement LFemurLengthMed: apply=false
        MarkerPair: markers=(LASI LMFC)
      Measurement RFemurLengthLat: apply=true
        MarkerPair: markers=(RASI RLFC)
        BodyScale femur_r: axes=(X Y Z)
      Measurement RFemurLengthMed: apply=false
        MarkerPair: markers=(RASI RMFC)
      Measurement LFibLengthLat: apply=true
        MarkerPair: markers=(LLFC LLMAL)
        BodyScale tibia_l: axes=(X Y Z)
      Measurement LFibLengthMed: apply=false
        MarkerPair: markers=(LMFC LMMAL)
      Measurement RFibLengthLat: apply=true
        MarkerPair: markers=(RLFC RLMAL)
        BodyScale tibia_r: axes=(X Y Z)
      Measurement RFibLengthMed: apply=false
        MarkerPair: markers=(RMFC RMMAL)
      Measurement LFootLength: apply=true
        MarkerPair: markers=(LCAL LToe)
        BodyScale talus_l: axes=(X Y Z)
        BodyScale calcn_l: axes=(X Y Z)
      Measurement RFootLength: apply=true
        MarkerPair: markers=(RCAL RToe)
        BodyScale calcn_r: axes=(X Y Z)
        BodyScale toes_r: axes=(X Y Z)
  MarkerPlacer:
    apply: true
    marker_file: C:/Users/dbak576/Documents/MAPClient Stuff/MATLAB/../HipOA_Data_H20s1/Static_H20s1.trc
    time_range: 0.005 3.36
    max_marker_movement: -1
    IKTaskSet:
      IKMarkerTask LFHD: apply=true weight=1
      IKMarkerTask RFHD: apply=true weight=1
      IKMarkerTask LBHD: apply=true weight=1
      IKMarkerTask RBHD: apply=true weight=1
      IKMarkerTask C7: apply=true weight=1
      IKMarkerTask T10: apply=true weight=1
      IKMarkerTask CLAV: apply=true weight=1
      IKMarkerTask STRN: apply=true weight=1
      IKMarkerTask RBack: apply=true weight=1
      IKMarkerTask RASI: apply=true weight=1
      IKMarkerTask LASI: apply=true weight=1
      IKMarkerTask LPSI: apply=true weight=1
      IKMarkerTask RPSI: apply=true weight=1
      IKMarkerTask RTH1: apply=true weight=1
      IKMarkerTask RTH2: apply=true weight=1
      IKMarkerTask RTH3: apply=true weight=1
      IKMarkerTask RTH4: apply=true weight=1
      IKMarkerTask RTB1: apply=true weight=1
      IKMarkerTask RTB2: apply=true weight=1
      IKMarkerTask RTB3: apply=true weight=1
      IKMarkerTask RTB4: apply=true weight=1
      IKMarkerTask RLFC: apply=true weight=1
      IKMarkerTask RMFC: apply=true weight=1
      IKMarkerTask RLMAL: apply=true weight=1
      IKMarkerTask RMMAL: apply=true weight=1
      IKMarkerTask RCAL: apply=true weight=1
      IKMarkerTask RMT1: apply=true weight=1
      IKMarkerTask RMT5: apply=true weight=1
      IKMarkerTask RToe: apply=true weight=1
      IKMarkerTask LHJC: apply=true weight=1
      IKMarkerTask RHJC: apply=true weight=1
      IKMarkerTask RKJC: apply=true weight=1
      IKMarkerTask RAJC: apply=true weight=1
      IKMarkerTask LKJC: apply=true weight=1
      IKMarkerTask LAJC: apply=true weight=1
      IKMarkerTask LTH1: apply=true weight=1
      IKMarkerTask LTH2: apply=true weight=1
      IKMarkerTask LTH3: apply=true weight=1
      IKMarkerTask LTH4: apply=true weight=1
      IKMarkerTask LTB1: apply=true weight=1
      IKMarkerTask LTB2: apply=true weight=1
      IKMarkerTask LTB3: apply=true weight=1
      IKMarkerTask LTB4: apply=true weight=1
      IKMarkerTask LLFC: apply=true weight=1
      IKMarkerTask LMFC: apply=true weight=1
      IKMarkerTask LLMAL: apply=true weight=1
      IKMarkerTask LMMAL: apply=true weight=1
      IKMarkerTask LCAL: apply=true weight=1
      IKMarkerTask LMT1: apply=true weight=1
      IKMarkerTask LMT5: apply=true weight=1
      IKMarkerTask LToe: apply=true weight=1
